μ_0 := 4*π*10^-7  # Гн/м
μ := 376.98*10^-6
σ_M := 14.4*10^6  # См/м
f := 10  # Гц
μ_0 = 1.25664e-6
a := 0.087  # м
p_M := 0.069  # Ом/м
μ_M := μ*μ_0
μ_M = 4.73727e-10
σ_M := 1/p_M
σ_M = 14.4928
δ(f) := 1/sqrt(π*f*μ_M*σ_M)
δ(f) = 2153.21
k(f) - (-□) > k
k := sqrt(1j*2*π*f*μ_M*σ_M)
k = 0.000464424 + 0.000464424i
k := 0.000345j
1/м
f := 10  # Гц
a := 0.087  # м
I_0 := bessel(0, k*a)  # error: Неизвестная ошибка: must_be_%lt=.
I_0 =  # error: Эта переменная не определена. Проверьте правильность установки обозначения.
I0 := 1.00015
I_1 := bessel(1, k*a)  # error: Значение должно быть положительным.
I_1 =  # error
I1 := 0.000015j
Z_ц - (-□) > Z
Z_ц := k*I0*(k*a)/(2*π*a*σ_M*I1*(k*a))
Z_ц = 2.90364
R_ш + 1j*X_ш
Z_ш := k(f)/(2*h*σ_M*tanh(k*b))
